*Heading
** Job name: Job-1 Model name: contiOpti
** Generated by: Abaqus/CAE 2020
*Preprint, echo=NO, model=NO, history=NO, contact=NO
**
** ----------------------------------------------------------------
** ----------------------------------------------------------------
**
** PARTS
**
**
*Part, name=Screw
*End Part
**
**
*Part, name=Bone
*End Part
**
**
** ----------------------------------------------------------------
**
** ASSEMBLY
**
*Assembly, name=Assembly
**
*Instance, name=Bone-1, part=Bone
*Node
11,-5.13979043,-2.27107019,-4.18355035
12,-5.13979043,-2.03201017,-4.18355035
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*Element, type=C3D8, elset=Set-1
1, 11, 51, 52, 12, 1771, 1811, 1812, 1772,
2, 12, 52, 53, 13, 1772, 1812, 1813, 1773,
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** Section: Bone
*Solid Section, elset=Set-1, controls=EC-1, material=Bone
,
*End Instance
*Instance, name=Screw-1, part=Screw
*Node
1,-0.90000000,1.00000000,-3.00000000
2,-1.88078833,-0.79560912,6.31451607
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*Element, type=C3D10, elset=Set-2
1, 953, 954, 955, 910, 1442, 1441, 1440, 1444, 1443, 1445,
2, 953, 956, 710, 957, 1448, 1447, 1446, 1450, 1449, 1451,
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** Section: Screw
*Solid Section, elset=Set-2, controls=EC-2, material=Screw
,
*End Instance
** ----------------------------------------------------------------
**
*Nset, nset=BoneSide, instance=Bone-1
11, 12, 13, 14, 15, 16
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*Nset, nset=ScrewTop, instance=Screw-1
46,    47,    48,    50,    51,   809
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*Elset, elset=ScrewTop, instance=Screw-1
108,   181,   221,   253,   298,   550
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*Node 1, -1.0, 1.0, 7.0*Nset, nset=ScrewTopRef 1,** Constraint: Constraint-1*Rigid Body, ref node=ScrewTopRef, tie nset=ScrewTop**
** ----------------------------------------------------------------
*End Assembly
**
** ----------------------------------------------------------------
** ----------------------------------------------------------------
**
** ELEMENT CONTROLS
**
*Section Controls, name=EC-1, DISTORTION CONTROL=YES, ELEMENT DELETION=YES, MAX DEGRADATION=0.8, second order accuracy=YES
1., 1., 1.
**
** ----------------------------------------------------------------
** ----------------------------------------------------------------
**
** ELEMENT CONTROLS
**
*Section Controls, name=EC-2, DISTORTION CONTROL=YES, ELEMENT DELETION=NO, MAX DEGRADATION=0.8, second order accuracy=YES
1., 1., 1.
**
** ----------------------------------------------------------------
** ----------------------------------------------------------------
**
*Amplitude, name=Amp-1, definition=SMOOTH STEP
0.,              0.,              1.,              1.
**
** ----------------------------------------------------------------
*INCLUDE, INPUT=matCDP.inp
*INCLUDE, INPUT=matLE.inp
*INCLUDE, INPUT=interFric.inp
** ----------------------------------------------------------------
**
** STEP: Step-1
**
*Step, name=Step-1, nlgeom=YES
*Dynamic, Explicit
, 1.
*Bulk Viscosity
0.06, 1.2
** Mass Scaling: Semi-Automatic
**               Whole Model
*Fixed Mass Scaling, dt=2.5e-06, type=below min
**
** ----------------------------------------------------------------
** ----------------------------------------------------------------
**
** BOUNDARY CONDITIONS
**
** Name: BC-1 Type: Displacement/Rotation
*Boundary, amplitude=Amp-1
ScrewTopRef, 3, 3, 0.500000
** Name: BC-2 Type: Displacement/Rotation
*Boundary, amplitude=Amp-1
BoneSide, 1, 1
BoneSide, 2, 2
BoneSide, 3, 3
**
** ----------------------------------------------------------------
** ----------------------------------------------------------------
**
** OUTPUT REQUESTS
**
*Restart, write, number interval=1, time marks=NO
**
** FIELD OUTPUT: F-Output-1
**
*Output, field
*Node Output
A, RF, TIEADJUST, TIEDSTATUS, U, V
*Element Output, directions=YES
BURNF, DAMAGEC, DAMAGEMC, DAMAGEMT, DAMAGESHR, DAMAGET, DBURNF, DENSITY, DENSITYVAVG, EACTIVE, EMSF, ESDV, EVF, FV, LE, MFR
PE, PEEQ, PEEQVAVG, PEVAVG, RHOE, RHOP, S, SDV, STATUS, SVAVG, UVARM
*Contact Output
CSTRESS,
**
** HISTORY OUTPUT: H-Output-2
**
*Output, history
*Node Output, nset=ScrewTopRef
RF3, U3, UR3
**
** HISTORY OUTPUT: H-Output-1
**
*Output, history, variable=PRESELECT
*End Step
**
** ----------------------------------------------------------------
